Clear
Set DefaultBaseFrequency=50
New Circuit.c phases=3 basekv=10.0 pu=1.0 angle=0 bus1=n1 Z1=[0.09950371902099893, 0.9950371902099893] Z0=[0.09950371902099893, 0.9950371902099893]
New Line.l101 phases=3 bus1=n1.1.2.3 bus2=n2.1.2.3 length=1 units=km rmatrix=[0.5 | 0.1 0.5 | 0.096 0.1 0.5] xmatrix=[0.8 | 0.3 0.8 | 0.26 0.3 0.8] cmatrix=[18.0 | -3.0 18.4 | -2.4 -3.0 18.0]
New Line.l102 phases=3 bus1=n2.1.2.3 bus2=n3.1.2.3 length=1 units=km rmatrix=[0.7485752307692307 | 0.14507953846153845 0.742530923076923 | 0.14233938461538462 0.14474123076923076 0.7480883076923077] xmatrix=[1.0842318461538463 | 0.34952630769230764 1.1129173846153848 | 0.27003507692307693 0.3458898461538461 1.0756864615384618] cmatrix=[25.0 | -5.0 25.0 | -5.0 -5.0 25.0]
New Line.l103 phases=1 bus1=n2.1 bus2=n4.1 length=1 units=km rmatrix=[0.5] xmatrix=[0.8] cmatrix=[18.0]
New Line.l104 phases=2 bus1=n2.2.3 bus2=n5.2.3 length=1 units=km rmatrix=[0.6187757692307693 | 0.12061769230769231 0.6234069230769231] xmatrix=[0.9274311538461538 | 0.28824153846153844 0.8964053846153847] cmatrix=[23.0 | -3.7499999999999996 22.5]
New Line.l105 phases=1 bus1=n5.3 bus2=n6.3 length=1 units=km rmatrix=[0.375] xmatrix=[0.6000000000000001] cmatrix=[13.499999999999998]
New Line.l106 phases=2 bus1=n3.1.3 bus2=n7.1.3 length=1 units=km rmatrix=[0.5 | 0.096 0.5] xmatrix=[0.8 | 0.26 0.8] cmatrix=[18.0 | -2.4 18.0]
New Line.l107 phases=1 bus1=n3.2 bus2=n8.2 length=1 units=km rmatrix=[0.25] xmatrix=[0.4] cmatrix=[9.2]
New Line.l108 phases=1 bus1=n4.1 bus2=n9.1 length=1 units=km rmatrix=[0.25] xmatrix=[0.4] cmatrix=[9.0]
New Line.l109 phases=1 bus1=n9.1 bus2=n7.1 length=1 units=km rmatrix=[0.375] xmatrix=[0.6000000000000001] cmatrix=[13.499999999999998]
New Line.l110 phases=1 bus1=n8.2 bus2=open_l110_to.2 length=1 units=km rmatrix=[0.2] xmatrix=[0.32000000000000006] cmatrix=[7.36]
New Load.ld301_a bus1=n4.1 phases=1 conn=wye model=1 kV=5.773502691896257 kW=60.0 kvar=20.0 vminpu=0.1 vmaxpu=2
New Load.ld302_b bus1=n5.2 phases=1 conn=wye model=5 kV=5.773502691896257 kW=50.0 kvar=15.0 vminpu=0.1 vmaxpu=2
New Load.ld302_c bus1=n5.3 phases=1 conn=wye model=5 kV=5.773502691896257 kW=40.0 kvar=10.0 vminpu=0.1 vmaxpu=2
New Load.ld303_c bus1=n6.3 phases=1 conn=wye model=2 kV=5.773502691896257 kW=30.0 kvar=8.0 vminpu=0.1 vmaxpu=2
New Load.ld304_a bus1=n7.1 phases=1 conn=wye model=1 kV=5.773502691896257 kW=40.0 kvar=10.0 vminpu=0.1 vmaxpu=2
New Load.ld304_c bus1=n7.3 phases=1 conn=wye model=1 kV=5.773502691896257 kW=35.0 kvar=10.0 vminpu=0.1 vmaxpu=2
New Load.ld305_b bus1=n8.2 phases=1 conn=wye model=5 kV=5.773502691896257 kW=25.0 kvar=6.0 vminpu=0.1 vmaxpu=2
New Load.ld306_a bus1=n9.1 phases=1 conn=wye model=2 kV=5.773502691896257 kW=30.0 kvar=9.0 vminpu=0.1 vmaxpu=2
New Load.ld401_a bus1=n7.1 phases=1 conn=wye model=1 kV=5.773502691896257 kW=-20.0 kvar=-5.0 vminpu=0.1 vmaxpu=2
New Load.ld501_a bus1=n3.1 phases=1 conn=wye model=5 kV=5.773502691896257 kW=50.0 kvar=16.666666666666668 vminpu=0.1 vmaxpu=2
New Load.ld501_b bus1=n3.2 phases=1 conn=wye model=5 kV=5.773502691896257 kW=50.0 kvar=16.666666666666668 vminpu=0.1 vmaxpu=2
New Load.ld501_c bus1=n3.3 phases=1 conn=wye model=5 kV=5.773502691896257 kW=50.0 kvar=16.666666666666668 vminpu=0.1 vmaxpu=2
Set VoltageBases=[10.0]
CalcVoltageBases
Set Tolerance=1e-12
Set MaxIterations=200
Solve
