Clear
Set DefaultBaseFrequency=50
New Circuit.c phases=3 basekv=10.0 pu=1.0 angle=0 bus1=n1 Z1=[0.09950371902099893, 0.9950371902099893] Z0=[0.09950371902099893, 0.9950371902099893]
New LineCode.lc101 nphases=3 units=km rmatrix=[0.25 | 0.05 0.25 | 0.047 0.051 0.35] xmatrix=[0.4 | 0.15 0.4 | 0.12 0.145 0.45] cmatrix=[0.0 | 0.0 0.0 | 0.0 0.0 0.0] Neutral=3 Kron=yes
New Line.l101 phases=2 bus1=n1.2.3 bus2=n2.2.3 linecode=lc101 length=4.0 units=km cmatrix=[9.2 | -1.5 9.0]
New Load.ld301_b bus1=n2.2 phases=1 conn=wye model=1 kV=5.773502691896257 kW=180.0 kvar=50.0 vminpu=0.1 vmaxpu=2
New Load.ld301_c bus1=n2.3 phases=1 conn=wye model=1 kV=5.773502691896257 kW=90.0 kvar=20.0 vminpu=0.1 vmaxpu=2
Set VoltageBases=[10.0]
CalcVoltageBases
Set Tolerance=1e-12
Set MaxIterations=200
Solve
