Clear
Set DefaultBaseFrequency=50
New Circuit.c phases=3 basekv=11.0 pu=1.0 angle=0 bus1=n1 Z1=[0.1203995000154087, 1.203995000154087] Z0=[0.1203995000154087, 1.203995000154087]
New Line.l101 phases=3 bus1=n1.1.2.3 bus2=n2.1.2.3 length=1 units=km rmatrix=[0.5 | 0.1 0.5 | 0.096 0.1 0.5] xmatrix=[0.8 | 0.3 0.8 | 0.26 0.3 0.8] cmatrix=[18.0 | -3.0 18.4 | -2.4 -3.0 18.0]
New Line.l102 phases=2 bus1=n2.1.2 bus2=n3.1.2 length=1 units=km rmatrix=[0.49905015384615387 | 0.09671969230769231 0.4950206153846154] xmatrix=[0.7228212307692308 | 0.23301753846153844 0.7419449230769231] cmatrix=[18.0 | -3.0 18.4]
New Line.l103 phases=2 bus1=n3.1.2 bus2=n4.1.2 length=1 units=km rmatrix=[0.25 | 0.05 0.25] xmatrix=[0.4 | 0.15 0.4] cmatrix=[9.0 | -1.5 9.2]
New Line.l104 phases=2 bus1=n2.1.3 bus2=n5.1.3 length=1 units=km rmatrix=[0.375 | 0.07200000000000001 0.375] xmatrix=[0.6000000000000001 | 0.195 0.6000000000000001] cmatrix=[13.499999999999998 | -1.8 13.499999999999998]
New Load.ld301_ab bus1=n3.1.2 phases=1 conn=delta model=2 kV=11.0 kW=80.0 kvar=25.0 vminpu=0.1 vmaxpu=2
New Load.ld302_ab bus1=n4.1.2 phases=1 conn=delta model=2 kV=11.0 kW=50.0 kvar=15.0 vminpu=0.1 vmaxpu=2
New Load.ld303_a bus1=n4.1 phases=1 conn=wye model=2 kV=6.350852961085884 kW=20.0 kvar=5.0 vminpu=0.1 vmaxpu=2
New Load.ld303_b bus1=n4.2 phases=1 conn=wye model=2 kV=6.350852961085884 kW=10.0 kvar=3.0 vminpu=0.1 vmaxpu=2
New Load.ld304_ca bus1=n5.3.1 phases=1 conn=delta model=2 kV=11.0 kW=60.0 kvar=20.0 vminpu=0.1 vmaxpu=2
New Load.ld305_ab bus1=n2.1.2 phases=1 conn=delta model=2 kV=11.0 kW=40.0 kvar=10.0 vminpu=0.1 vmaxpu=2
New Load.ld305_bc bus1=n2.2.3 phases=1 conn=delta model=2 kV=11.0 kW=30.0 kvar=8.0 vminpu=0.1 vmaxpu=2
New Load.ld305_ca bus1=n2.3.1 phases=1 conn=delta model=2 kV=11.0 kW=20.0 kvar=5.0 vminpu=0.1 vmaxpu=2
Set VoltageBases=[11.0]
CalcVoltageBases
Set Tolerance=1e-12
Set MaxIterations=200
Solve
