Clear
Set DefaultBaseFrequency=50
New Circuit.c phases=3 basekv=22.0 pu=1.0 angle=0 bus1=n1 Z1=[0.4815980000616348, 4.815980000616348] Z0=[0.4815980000616348, 4.815980000616348]
New Line.l101 phases=3 bus1=n1.1.2.3 bus2=n2.1.2.3 length=1 units=km rmatrix=[0.5 | 0.1 0.5 | 0.096 0.1 0.5] xmatrix=[0.8 | 0.3 0.8 | 0.26 0.3 0.8] cmatrix=[18.0 | -3.0 18.4 | -2.4 -3.0 18.0]
New Line.l102 phases=2 bus1=n3.1.2 bus2=n4.1.2 length=1 units=km rmatrix=[0.07485752307692307 | 0.014507953846153845 0.07425309230769231] xmatrix=[0.10842318461538461 | 0.03495263076923077 0.11129173846153846] cmatrix=[2.6999999999999997 | -0.45 2.76]
New Transformer.t151 phases=1 windings=3 buses=[n2.2.3 n3.4.1 n3.2.4] conns=[wye wye wye] kVs=[22.0 0.24 0.24] kVAs=[50.0 50.0 50.0] %Rs=[0.4 1.2 1.2] XHL=4.098780306383839 XHT=4.098780306383839 XLT=2.9787133605366165 %noloadloss=0.0 %imag=0.0 ppm_antifloat=0 taps=[0.925 1.0 1.0]
New Reactor.lo151n2 phases=2 bus1=n2.2.3 rmatrix=[0.0 | 0.0 0.0] xmatrix=[1.129333897999718e+16 | -1.1293327686669494e+16 1.129333897999718e+16]
New Reactor.g151to phases=1 bus1=n3.4 bus2=n3.0 R=0.5 X=0.05
New Load.ld301_a bus1=n3.1 phases=1 conn=wye model=1 kV=0.24 kW=12.0 kvar=4.0 vminpu=0.1 vmaxpu=2
New Load.ld301_b bus1=n3.2 phases=1 conn=wye model=1 kV=0.24 kW=5.0 kvar=1.5 vminpu=0.1 vmaxpu=2
New Load.ld302_a bus1=n3.1 phases=1 conn=wye model=2 kV=0.24 kW=2.0 kvar=0.6 vminpu=0.1 vmaxpu=2
New Load.ld302_b bus1=n3.2 phases=1 conn=wye model=2 kV=0.24 kW=3.0 kvar=1.0 vminpu=0.1 vmaxpu=2
New Load.ld303_a bus1=n4.1 phases=1 conn=wye model=1 kV=0.24 kW=4.0 kvar=1.2 vminpu=0.1 vmaxpu=2
New Load.ld303_b bus1=n4.2 phases=1 conn=wye model=1 kV=0.24 kW=2.0 kvar=0.6 vminpu=0.1 vmaxpu=2
New Load.ld304_a bus1=n4.1 phases=1 conn=wye model=5 kV=0.24 kW=1.0 kvar=0.3 vminpu=0.1 vmaxpu=2
New Load.ld304_b bus1=n4.2 phases=1 conn=wye model=5 kV=0.24 kW=2.5 kvar=0.8 vminpu=0.1 vmaxpu=2
Set VoltageBases=[22.0, 0.4156921938165305]
CalcVoltageBases
Set Tolerance=1e-12
Set MaxIterations=200
Solve
