! scenario 0
Clear
Set DefaultBaseFrequency=50
New Circuit.c phases=3 basekv=22.0 pu=1.1 angle=0 bus1=n1 Z1=[0.5297578000677983, 5.297578000677983] Z0=[0.5297578000677983, 5.297578000677983]
New Line.l101 phases=3 bus1=n1.1.2.3 bus2=n2.1.2.3 length=1 units=km rmatrix=[0.5 | 0.1 0.5 | 0.096 0.1 0.5] xmatrix=[0.8 | 0.3 0.8 | 0.26 0.3 0.8] cmatrix=[18.0 | -3.0 18.4 | -2.4 -3.0 18.0]
New Line.l102 phases=1 bus1=n3.1 bus2=n4.1 length=1 units=km rmatrix=[28.986960440108934] xmatrix=[16.971230962241698] cmatrix=[119.99999999999999]
New Line.l103 phases=2 bus1=n5.1.2 bus2=n7.1.2 length=1 units=km rmatrix=[0.07485752307692307 | 0.014507953846153845 0.07425309230769231] xmatrix=[0.10842318461538461 | 0.03495263076923077 0.11129173846153846] cmatrix=[2.6999999999999997 | -0.45 2.76]
New Transformer.t151 phases=1 windings=2 buses=[n2.1.2 n3.1.4] conns=[wye wye] kVs=[22.0 12.7] kVAs=[200.0 200.0] XHL=4.8989794855663575 %loadloss=1.0 %noloadloss=0.0 %imag=0.0 ppm_antifloat=0 taps=[1.0 1.0]
New Reactor.lo151n2 phases=2 bus1=n2.1.2 rmatrix=[0.0 | 0.0 0.0] xmatrix=[4033335349998992.0 | -4033331316667676.0 4033335349998992.0]
New Reactor.g151to phases=1 bus1=n3.4 bus2=n3.0 R=5.0 X=0.1
New Transformer.t152 phases=1 windings=3 buses=[n4.1.0 n5.1.0 n5.0.2] conns=[wye wye wye] kVs=[12.7 0.24 0.24] kVAs=[25.0 25.0 25.0] %Rs=[0.8 1.6 1.6] XHL=4.399272667157607 XHT=4.399272667157607 XLT=2.932848444771738 %noloadloss=0.0 %imag=0.0 ppm_antifloat=0 taps=[1.025 1.0 1.0]
New Transformer.t153 phases=1 windings=3 buses=[n2.2.3 n6.4.1 n6.2.4] conns=[wye wye wye] kVs=[22.0 0.24 0.24] kVAs=[50.0 50.0 50.0] %Rs=[0.4 1.2 1.2] XHL=4.098780306383839 XHT=4.098780306383839 XLT=2.9787133605366165 %noloadloss=0.0 %imag=0.0 ppm_antifloat=0 taps=[1.0 1.0 1.0]
New Reactor.lo153n2 phases=2 bus1=n2.2.3 rmatrix=[0.0 | 0.0 0.0] xmatrix=[1.129333897999718e+16 | -1.1293327686669494e+16 1.129333897999718e+16]
New Reactor.g153to phases=1 bus1=n6.4 bus2=n6.0 R=0.5 X=0.05
New Fault.f601 phases=1 bus1=n5.1 r=1e-13
Set VoltageBases=[22.0, 0.4156921938165305]
CalcVoltageBases
Set Tolerance=1e-12
Set MaxIterations=200
Set Mode=Snapshot
Solve

! scenario 1
Clear
Set DefaultBaseFrequency=50
New Circuit.c phases=3 basekv=22.0 pu=1.1 angle=0 bus1=n1 Z1=[0.5297578000677983, 5.297578000677983] Z0=[0.5297578000677983, 5.297578000677983]
New Line.l101 phases=3 bus1=n1.1.2.3 bus2=n2.1.2.3 length=1 units=km rmatrix=[0.5 | 0.1 0.5 | 0.096 0.1 0.5] xmatrix=[0.8 | 0.3 0.8 | 0.26 0.3 0.8] cmatrix=[18.0 | -3.0 18.4 | -2.4 -3.0 18.0]
New Line.l102 phases=1 bus1=n3.1 bus2=n4.1 length=1 units=km rmatrix=[28.986960440108934] xmatrix=[16.971230962241698] cmatrix=[119.99999999999999]
New Line.l103 phases=2 bus1=n5.1.2 bus2=n7.1.2 length=1 units=km rmatrix=[0.07485752307692307 | 0.014507953846153845 0.07425309230769231] xmatrix=[0.10842318461538461 | 0.03495263076923077 0.11129173846153846] cmatrix=[2.6999999999999997 | -0.45 2.76]
New Transformer.t151 phases=1 windings=2 buses=[n2.1.2 n3.1.4] conns=[wye wye] kVs=[22.0 12.7] kVAs=[200.0 200.0] XHL=4.8989794855663575 %loadloss=1.0 %noloadloss=0.0 %imag=0.0 ppm_antifloat=0 taps=[1.0 1.0]
New Reactor.lo151n2 phases=2 bus1=n2.1.2 rmatrix=[0.0 | 0.0 0.0] xmatrix=[4033335349998992.0 | -4033331316667676.0 4033335349998992.0]
New Reactor.g151to phases=1 bus1=n3.4 bus2=n3.0 R=5.0 X=0.1
New Transformer.t152 phases=1 windings=3 buses=[n4.1.0 n5.1.0 n5.0.2] conns=[wye wye wye] kVs=[12.7 0.24 0.24] kVAs=[25.0 25.0 25.0] %Rs=[0.8 1.6 1.6] XHL=4.399272667157607 XHT=4.399272667157607 XLT=2.932848444771738 %noloadloss=0.0 %imag=0.0 ppm_antifloat=0 taps=[1.025 1.0 1.0]
New Transformer.t153 phases=1 windings=3 buses=[n2.2.3 n6.4.1 n6.2.4] conns=[wye wye wye] kVs=[22.0 0.24 0.24] kVAs=[50.0 50.0 50.0] %Rs=[0.4 1.2 1.2] XHL=4.098780306383839 XHT=4.098780306383839 XLT=2.9787133605366165 %noloadloss=0.0 %imag=0.0 ppm_antifloat=0 taps=[1.0 1.0 1.0]
New Reactor.lo153n2 phases=2 bus1=n2.2.3 rmatrix=[0.0 | 0.0 0.0] xmatrix=[1.129333897999718e+16 | -1.1293327686669494e+16 1.129333897999718e+16]
New Reactor.g153to phases=1 bus1=n6.4 bus2=n6.0 R=0.5 X=0.05
New Fault.f601 phases=1 bus1=n5.2 r=0.1
Set VoltageBases=[22.0, 0.4156921938165305]
CalcVoltageBases
Set Tolerance=1e-12
Set MaxIterations=200
Set Mode=Snapshot
Solve

! scenario 2
Clear
Set DefaultBaseFrequency=50
New Circuit.c phases=3 basekv=22.0 pu=1.1 angle=0 bus1=n1 Z1=[0.5297578000677983, 5.297578000677983] Z0=[0.5297578000677983, 5.297578000677983]
New Line.l101 phases=3 bus1=n1.1.2.3 bus2=n2.1.2.3 length=1 units=km rmatrix=[0.5 | 0.1 0.5 | 0.096 0.1 0.5] xmatrix=[0.8 | 0.3 0.8 | 0.26 0.3 0.8] cmatrix=[18.0 | -3.0 18.4 | -2.4 -3.0 18.0]
New Line.l102 phases=1 bus1=n3.1 bus2=n4.1 length=1 units=km rmatrix=[28.986960440108934] xmatrix=[16.971230962241698] cmatrix=[119.99999999999999]
New Line.l103 phases=2 bus1=n5.1.2 bus2=n7.1.2 length=1 units=km rmatrix=[0.07485752307692307 | 0.014507953846153845 0.07425309230769231] xmatrix=[0.10842318461538461 | 0.03495263076923077 0.11129173846153846] cmatrix=[2.6999999999999997 | -0.45 2.76]
New Transformer.t151 phases=1 windings=2 buses=[n2.1.2 n3.1.4] conns=[wye wye] kVs=[22.0 12.7] kVAs=[200.0 200.0] XHL=4.8989794855663575 %loadloss=1.0 %noloadloss=0.0 %imag=0.0 ppm_antifloat=0 taps=[1.0 1.0]
New Reactor.lo151n2 phases=2 bus1=n2.1.2 rmatrix=[0.0 | 0.0 0.0] xmatrix=[4033335349998992.0 | -4033331316667676.0 4033335349998992.0]
New Reactor.g151to phases=1 bus1=n3.4 bus2=n3.0 R=5.0 X=0.1
New Transformer.t152 phases=1 windings=3 buses=[n4.1.0 n5.1.0 n5.0.2] conns=[wye wye wye] kVs=[12.7 0.24 0.24] kVAs=[25.0 25.0 25.0] %Rs=[0.8 1.6 1.6] XHL=4.399272667157607 XHT=4.399272667157607 XLT=2.932848444771738 %noloadloss=0.0 %imag=0.0 ppm_antifloat=0 taps=[1.025 1.0 1.0]
New Transformer.t153 phases=1 windings=3 buses=[n2.2.3 n6.4.1 n6.2.4] conns=[wye wye wye] kVs=[22.0 0.24 0.24] kVAs=[50.0 50.0 50.0] %Rs=[0.4 1.2 1.2] XHL=4.098780306383839 XHT=4.098780306383839 XLT=2.9787133605366165 %noloadloss=0.0 %imag=0.0 ppm_antifloat=0 taps=[1.0 1.0 1.0]
New Reactor.lo153n2 phases=2 bus1=n2.2.3 rmatrix=[0.0 | 0.0 0.0] xmatrix=[1.129333897999718e+16 | -1.1293327686669494e+16 1.129333897999718e+16]
New Reactor.g153to phases=1 bus1=n6.4 bus2=n6.0 R=0.5 X=0.05
New Fault.f601 phases=1 bus1=n5.1 bus2=n5.2 r=1e-13
Set VoltageBases=[22.0, 0.4156921938165305]
CalcVoltageBases
Set Tolerance=1e-12
Set MaxIterations=200
Set Mode=Snapshot
Solve

! scenario 3
Clear
Set DefaultBaseFrequency=50
New Circuit.c phases=3 basekv=22.0 pu=1.1 angle=0 bus1=n1 Z1=[0.5297578000677983, 5.297578000677983] Z0=[0.5297578000677983, 5.297578000677983]
New Line.l101 phases=3 bus1=n1.1.2.3 bus2=n2.1.2.3 length=1 units=km rmatrix=[0.5 | 0.1 0.5 | 0.096 0.1 0.5] xmatrix=[0.8 | 0.3 0.8 | 0.26 0.3 0.8] cmatrix=[18.0 | -3.0 18.4 | -2.4 -3.0 18.0]
New Line.l102 phases=1 bus1=n3.1 bus2=n4.1 length=1 units=km rmatrix=[28.986960440108934] xmatrix=[16.971230962241698] cmatrix=[119.99999999999999]
New Line.l103 phases=2 bus1=n5.1.2 bus2=n7.1.2 length=1 units=km rmatrix=[0.07485752307692307 | 0.014507953846153845 0.07425309230769231] xmatrix=[0.10842318461538461 | 0.03495263076923077 0.11129173846153846] cmatrix=[2.6999999999999997 | -0.45 2.76]
New Transformer.t151 phases=1 windings=2 buses=[n2.1.2 n3.1.4] conns=[wye wye] kVs=[22.0 12.7] kVAs=[200.0 200.0] XHL=4.8989794855663575 %loadloss=1.0 %noloadloss=0.0 %imag=0.0 ppm_antifloat=0 taps=[1.0 1.0]
New Reactor.lo151n2 phases=2 bus1=n2.1.2 rmatrix=[0.0 | 0.0 0.0] xmatrix=[4033335349998992.0 | -4033331316667676.0 4033335349998992.0]
New Reactor.g151to phases=1 bus1=n3.4 bus2=n3.0 R=5.0 X=0.1
New Transformer.t152 phases=1 windings=3 buses=[n4.1.0 n5.1.0 n5.0.2] conns=[wye wye wye] kVs=[12.7 0.24 0.24] kVAs=[25.0 25.0 25.0] %Rs=[0.8 1.6 1.6] XHL=4.399272667157607 XHT=4.399272667157607 XLT=2.932848444771738 %noloadloss=0.0 %imag=0.0 ppm_antifloat=0 taps=[1.025 1.0 1.0]
New Transformer.t153 phases=1 windings=3 buses=[n2.2.3 n6.4.1 n6.2.4] conns=[wye wye wye] kVs=[22.0 0.24 0.24] kVAs=[50.0 50.0 50.0] %Rs=[0.4 1.2 1.2] XHL=4.098780306383839 XHT=4.098780306383839 XLT=2.9787133605366165 %noloadloss=0.0 %imag=0.0 ppm_antifloat=0 taps=[1.0 1.0 1.0]
New Reactor.lo153n2 phases=2 bus1=n2.2.3 rmatrix=[0.0 | 0.0 0.0] xmatrix=[1.129333897999718e+16 | -1.1293327686669494e+16 1.129333897999718e+16]
New Reactor.g153to phases=1 bus1=n6.4 bus2=n6.0 R=0.5 X=0.05
New Fault.f601_1 phases=1 bus1=n5.1 r=1e-13
New Fault.f601_2 phases=1 bus1=n5.2 r=1e-13
Set VoltageBases=[22.0, 0.4156921938165305]
CalcVoltageBases
Set Tolerance=1e-12
Set MaxIterations=200
Set Mode=Snapshot
Solve

! scenario 4
Clear
Set DefaultBaseFrequency=50
New Circuit.c phases=3 basekv=22.0 pu=1.1 angle=0 bus1=n1 Z1=[0.5297578000677983, 5.297578000677983] Z0=[0.5297578000677983, 5.297578000677983]
New Line.l101 phases=3 bus1=n1.1.2.3 bus2=n2.1.2.3 length=1 units=km rmatrix=[0.5 | 0.1 0.5 | 0.096 0.1 0.5] xmatrix=[0.8 | 0.3 0.8 | 0.26 0.3 0.8] cmatrix=[18.0 | -3.0 18.4 | -2.4 -3.0 18.0]
New Line.l102 phases=1 bus1=n3.1 bus2=n4.1 length=1 units=km rmatrix=[28.986960440108934] xmatrix=[16.971230962241698] cmatrix=[119.99999999999999]
New Line.l103 phases=2 bus1=n5.1.2 bus2=n7.1.2 length=1 units=km rmatrix=[0.07485752307692307 | 0.014507953846153845 0.07425309230769231] xmatrix=[0.10842318461538461 | 0.03495263076923077 0.11129173846153846] cmatrix=[2.6999999999999997 | -0.45 2.76]
New Transformer.t151 phases=1 windings=2 buses=[n2.1.2 n3.1.4] conns=[wye wye] kVs=[22.0 12.7] kVAs=[200.0 200.0] XHL=4.8989794855663575 %loadloss=1.0 %noloadloss=0.0 %imag=0.0 ppm_antifloat=0 taps=[1.0 1.0]
New Reactor.lo151n2 phases=2 bus1=n2.1.2 rmatrix=[0.0 | 0.0 0.0] xmatrix=[4033335349998992.0 | -4033331316667676.0 4033335349998992.0]
New Reactor.g151to phases=1 bus1=n3.4 bus2=n3.0 R=5.0 X=0.1
New Transformer.t152 phases=1 windings=3 buses=[n4.1.0 n5.1.0 n5.0.2] conns=[wye wye wye] kVs=[12.7 0.24 0.24] kVAs=[25.0 25.0 25.0] %Rs=[0.8 1.6 1.6] XHL=4.399272667157607 XHT=4.399272667157607 XLT=2.932848444771738 %noloadloss=0.0 %imag=0.0 ppm_antifloat=0 taps=[1.025 1.0 1.0]
New Transformer.t153 phases=1 windings=3 buses=[n2.2.3 n6.4.1 n6.2.4] conns=[wye wye wye] kVs=[22.0 0.24 0.24] kVAs=[50.0 50.0 50.0] %Rs=[0.4 1.2 1.2] XHL=4.098780306383839 XHT=4.098780306383839 XLT=2.9787133605366165 %noloadloss=0.0 %imag=0.0 ppm_antifloat=0 taps=[1.0 1.0 1.0]
New Reactor.lo153n2 phases=2 bus1=n2.2.3 rmatrix=[0.0 | 0.0 0.0] xmatrix=[1.129333897999718e+16 | -1.1293327686669494e+16 1.129333897999718e+16]
New Reactor.g153to phases=1 bus1=n6.4 bus2=n6.0 R=0.5 X=0.05
New Fault.f601_2 phases=1 bus1=n2.2 r=1e-13
New Fault.f601_3 phases=1 bus1=n2.3 r=1e-13
Set VoltageBases=[22.0, 0.4156921938165305]
CalcVoltageBases
Set Tolerance=1e-12
Set MaxIterations=200
Set Mode=Snapshot
Solve

! scenario 5
Clear
Set DefaultBaseFrequency=50
New Circuit.c phases=3 basekv=22.0 pu=1.1 angle=0 bus1=n1 Z1=[0.5297578000677983, 5.297578000677983] Z0=[0.5297578000677983, 5.297578000677983]
New Line.l101 phases=3 bus1=n1.1.2.3 bus2=n2.1.2.3 length=1 units=km rmatrix=[0.5 | 0.1 0.5 | 0.096 0.1 0.5] xmatrix=[0.8 | 0.3 0.8 | 0.26 0.3 0.8] cmatrix=[18.0 | -3.0 18.4 | -2.4 -3.0 18.0]
New Line.l102 phases=1 bus1=n3.1 bus2=n4.1 length=1 units=km rmatrix=[28.986960440108934] xmatrix=[16.971230962241698] cmatrix=[119.99999999999999]
New Line.l103 phases=2 bus1=n5.1.2 bus2=n7.1.2 length=1 units=km rmatrix=[0.07485752307692307 | 0.014507953846153845 0.07425309230769231] xmatrix=[0.10842318461538461 | 0.03495263076923077 0.11129173846153846] cmatrix=[2.6999999999999997 | -0.45 2.76]
New Transformer.t151 phases=1 windings=2 buses=[n2.1.2 n3.1.4] conns=[wye wye] kVs=[22.0 12.7] kVAs=[200.0 200.0] XHL=4.8989794855663575 %loadloss=1.0 %noloadloss=0.0 %imag=0.0 ppm_antifloat=0 taps=[1.0 1.0]
New Reactor.lo151n2 phases=2 bus1=n2.1.2 rmatrix=[0.0 | 0.0 0.0] xmatrix=[4033335349998992.0 | -4033331316667676.0 4033335349998992.0]
New Reactor.g151to phases=1 bus1=n3.4 bus2=n3.0 R=5.0 X=0.1
New Transformer.t152 phases=1 windings=3 buses=[n4.1.0 n5.1.0 n5.0.2] conns=[wye wye wye] kVs=[12.7 0.24 0.24] kVAs=[25.0 25.0 25.0] %Rs=[0.8 1.6 1.6] XHL=4.399272667157607 XHT=4.399272667157607 XLT=2.932848444771738 %noloadloss=0.0 %imag=0.0 ppm_antifloat=0 taps=[1.025 1.0 1.0]
New Transformer.t153 phases=1 windings=3 buses=[n2.2.3 n6.4.1 n6.2.4] conns=[wye wye wye] kVs=[22.0 0.24 0.24] kVAs=[50.0 50.0 50.0] %Rs=[0.4 1.2 1.2] XHL=4.098780306383839 XHT=4.098780306383839 XLT=2.9787133605366165 %noloadloss=0.0 %imag=0.0 ppm_antifloat=0 taps=[1.0 1.0 1.0]
New Reactor.lo153n2 phases=2 bus1=n2.2.3 rmatrix=[0.0 | 0.0 0.0] xmatrix=[1.129333897999718e+16 | -1.1293327686669494e+16 1.129333897999718e+16]
New Reactor.g153to phases=1 bus1=n6.4 bus2=n6.0 R=0.5 X=0.05
New Fault.f601 phases=1 bus1=n7.1 r=1e-13
Set VoltageBases=[22.0, 0.4156921938165305]
CalcVoltageBases
Set Tolerance=1e-12
Set MaxIterations=200
Set Mode=Snapshot
Solve

! scenario 6
Clear
Set DefaultBaseFrequency=50
New Circuit.c phases=3 basekv=22.0 pu=1.1 angle=0 bus1=n1 Z1=[0.5297578000677983, 5.297578000677983] Z0=[0.5297578000677983, 5.297578000677983]
New Line.l101 phases=3 bus1=n1.1.2.3 bus2=n2.1.2.3 length=1 units=km rmatrix=[0.5 | 0.1 0.5 | 0.096 0.1 0.5] xmatrix=[0.8 | 0.3 0.8 | 0.26 0.3 0.8] cmatrix=[18.0 | -3.0 18.4 | -2.4 -3.0 18.0]
New Line.l102 phases=1 bus1=n3.1 bus2=n4.1 length=1 units=km rmatrix=[28.986960440108934] xmatrix=[16.971230962241698] cmatrix=[119.99999999999999]
New Line.l103 phases=2 bus1=n5.1.2 bus2=n7.1.2 length=1 units=km rmatrix=[0.07485752307692307 | 0.014507953846153845 0.07425309230769231] xmatrix=[0.10842318461538461 | 0.03495263076923077 0.11129173846153846] cmatrix=[2.6999999999999997 | -0.45 2.76]
New Transformer.t151 phases=1 windings=2 buses=[n2.1.2 n3.1.4] conns=[wye wye] kVs=[22.0 12.7] kVAs=[200.0 200.0] XHL=4.8989794855663575 %loadloss=1.0 %noloadloss=0.0 %imag=0.0 ppm_antifloat=0 taps=[1.0 1.0]
New Reactor.lo151n2 phases=2 bus1=n2.1.2 rmatrix=[0.0 | 0.0 0.0] xmatrix=[4033335349998992.0 | -4033331316667676.0 4033335349998992.0]
New Reactor.g151to phases=1 bus1=n3.4 bus2=n3.0 R=5.0 X=0.1
New Transformer.t152 phases=1 windings=3 buses=[n4.1.0 n5.1.0 n5.0.2] conns=[wye wye wye] kVs=[12.7 0.24 0.24] kVAs=[25.0 25.0 25.0] %Rs=[0.8 1.6 1.6] XHL=4.399272667157607 XHT=4.399272667157607 XLT=2.932848444771738 %noloadloss=0.0 %imag=0.0 ppm_antifloat=0 taps=[1.025 1.0 1.0]
New Transformer.t153 phases=1 windings=3 buses=[n2.2.3 n6.4.1 n6.2.4] conns=[wye wye wye] kVs=[22.0 0.24 0.24] kVAs=[50.0 50.0 50.0] %Rs=[0.4 1.2 1.2] XHL=4.098780306383839 XHT=4.098780306383839 XLT=2.9787133605366165 %noloadloss=0.0 %imag=0.0 ppm_antifloat=0 taps=[1.0 1.0 1.0]
New Reactor.lo153n2 phases=2 bus1=n2.2.3 rmatrix=[0.0 | 0.0 0.0] xmatrix=[1.129333897999718e+16 | -1.1293327686669494e+16 1.129333897999718e+16]
New Reactor.g153to phases=1 bus1=n6.4 bus2=n6.0 R=0.5 X=0.05
New Fault.f601 phases=1 bus1=n6.1 r=1e-13
Set VoltageBases=[22.0, 0.4156921938165305]
CalcVoltageBases
Set Tolerance=1e-12
Set MaxIterations=200
Set Mode=Snapshot
Solve

! scenario 7
Clear
Set DefaultBaseFrequency=50
New Circuit.c phases=3 basekv=22.0 pu=1.1 angle=0 bus1=n1 Z1=[0.5297578000677983, 5.297578000677983] Z0=[0.5297578000677983, 5.297578000677983]
New Line.l101 phases=3 bus1=n1.1.2.3 bus2=n2.1.2.3 length=1 units=km rmatrix=[0.5 | 0.1 0.5 | 0.096 0.1 0.5] xmatrix=[0.8 | 0.3 0.8 | 0.26 0.3 0.8] cmatrix=[18.0 | -3.0 18.4 | -2.4 -3.0 18.0]
New Line.l102 phases=1 bus1=n3.1 bus2=n4.1 length=1 units=km rmatrix=[28.986960440108934] xmatrix=[16.971230962241698] cmatrix=[119.99999999999999]
New Line.l103 phases=2 bus1=n5.1.2 bus2=n7.1.2 length=1 units=km rmatrix=[0.07485752307692307 | 0.014507953846153845 0.07425309230769231] xmatrix=[0.10842318461538461 | 0.03495263076923077 0.11129173846153846] cmatrix=[2.6999999999999997 | -0.45 2.76]
New Transformer.t151 phases=1 windings=2 buses=[n2.1.2 n3.1.4] conns=[wye wye] kVs=[22.0 12.7] kVAs=[200.0 200.0] XHL=4.8989794855663575 %loadloss=1.0 %noloadloss=0.0 %imag=0.0 ppm_antifloat=0 taps=[1.0 1.0]
New Reactor.lo151n2 phases=2 bus1=n2.1.2 rmatrix=[0.0 | 0.0 0.0] xmatrix=[4033335349998992.0 | -4033331316667676.0 4033335349998992.0]
New Reactor.g151to phases=1 bus1=n3.4 bus2=n3.0 R=5.0 X=0.1
New Transformer.t152 phases=1 windings=3 buses=[n4.1.0 n5.1.0 n5.0.2] conns=[wye wye wye] kVs=[12.7 0.24 0.24] kVAs=[25.0 25.0 25.0] %Rs=[0.8 1.6 1.6] XHL=4.399272667157607 XHT=4.399272667157607 XLT=2.932848444771738 %noloadloss=0.0 %imag=0.0 ppm_antifloat=0 taps=[1.025 1.0 1.0]
New Transformer.t153 phases=1 windings=3 buses=[n2.2.3 n6.4.1 n6.2.4] conns=[wye wye wye] kVs=[22.0 0.24 0.24] kVAs=[50.0 50.0 50.0] %Rs=[0.4 1.2 1.2] XHL=4.098780306383839 XHT=4.098780306383839 XLT=2.9787133605366165 %noloadloss=0.0 %imag=0.0 ppm_antifloat=0 taps=[1.0 1.0 1.0]
New Reactor.lo153n2 phases=2 bus1=n2.2.3 rmatrix=[0.0 | 0.0 0.0] xmatrix=[1.129333897999718e+16 | -1.1293327686669494e+16 1.129333897999718e+16]
New Reactor.g153to phases=1 bus1=n6.4 bus2=n6.0 R=0.5 X=0.05
New Fault.f601 phases=1 bus1=n6.1 bus2=n6.2 r=0.05
Set VoltageBases=[22.0, 0.4156921938165305]
CalcVoltageBases
Set Tolerance=1e-12
Set MaxIterations=200
Set Mode=Snapshot
Solve
